// SBML level 2 version 1

model xIVT()

  // Compartments:
  compartment cell = 1;

  // Species:
  species S1 in cell = 20; S1 is "NTP()";
  species SMN_s1_s2 in cell = 0; SMN_s1_s2 is "SMN(s1,s2)";
  species S3 in cell = 0; S3 is "PO4()";
  species PPi in cell = 0; PPi is "PPi()";
  species S5 in cell = 0; S5 is "MgPO4()";
  species S6 in cell = 1; S6 is "NDP()";
  species S7 in cell = 0; S7 is "Aborts()";
  species Prot_H33_R75 in cell = 0.15; Prot_H33_R75 is "Prot(H33,R75)";
  species Prot_H33_1_R75_2_SMN_s1_1_s2_2 in cell = 0; Prot_H33_1_R75_2_SMN_s1_1_s2_2 is "Prot(H33!1,R75!2).SMN(s1!1,s2!2)";

  // Parameters:
  kcat = 1;
  kcatPPi = 100;
  kprecip = 1;
  kdissolve = 1;
  kdegNTP = 0.0001;
  kabortive = 1;
  kon = 1;
  koff = 0.1;
  NTP_0 = 20;
  NDP_0 = 1;
  Prot_0 = 0.15;
  PO4 = 0;
  NTP = 0;
  SMN = 0;
  Aborts = 0;
  NDP = 0;
  MgPO4 = 0;
  Prot_bound_H33 = 0;
  Prot_bound_R75 = 0;

  // Assignment rules:
  Group_PO4 := 0 + S3;
  Group_NTP := 0 + S1;
  Group_SMN := SMN_s1_s2 + Prot_H33_1_R75_2_SMN_s1_1_s2_2;
  Group_Aborts := 0 + S7;
  Group_NDP := 0 + S6;
  Group_MgPO4 := 0 + S5;
  Group_Prot_bound_H33 := 0 + Prot_H33_1_R75_2_SMN_s1_1_s2_2;
  Group_Prot_bound_R75 := 0 + Prot_H33_1_R75_2_SMN_s1_1_s2_2;

  // Reactions:
  R1: S1 => SMN_s1_s2 + PPi; kcat*S1;
  R2: S1 => PPi + S7; kabortive*S1;
  R3: PPi => S3 + S3; kcatPPi*PPi;
  R4: S3 => S5; kprecip*S3;
  R5: S5 => S3; kdissolve*S5;
  R6: S1 => S3 + S6; kdegNTP*S1;
  R7: SMN_s1_s2 + Prot_H33_R75 => Prot_H33_1_R75_2_SMN_s1_1_s2_2; kon*SMN_s1_s2*Prot_H33_R75;
  R8: Prot_H33_1_R75_2_SMN_s1_1_s2_2 => SMN_s1_s2 + Prot_H33_R75; koff*Prot_H33_1_R75_2_SMN_s1_1_s2_2;
end
